// SBML level 2 version 3

model calcium()

  // Compartments:
  compartment cell = 1;

  // Species:
  species Null in cell = 1/cell; Null is "Null()";
  species Ga in cell = 10^Ga_0; Ga is "Ga()";
  species PLC in cell = 10^PLC_0; PLC is "PLC()";
  species Ca in cell = 10^Ca_0; Ca is "Ca()";

  // Parameters:
  k1 = 2.1061;
  k2 = 0.4548;
  k3 = 0.1818;
  K4 = 2.0585;
  k5 = 0.6884;
  K6 = 2.8516;
  k7 = 0.0934;
  k8 = 4.2881;
  K9 = 4.2435;
  k10 = 1.1329;
  k11 = 4.9664;
  K12 = 1.9839;
  Ga_0 = 0.7797;
  PLC_0 = 0.7797;
  Ca_0 = 0.7797;
  dummy = 1;

  // Initial assignments:
  _rateLaw1 = 10^k1;
  _rateLaw2 = 10^k2;
  _rateLaw5 = 10^k7;
  _rateLaw7 = 10^k10;

  // Assignment rules:
  G := 0 + Ga;
  P := 0 + PLC;
  C := 0 + Ca;
  NULL := 0 + Null;
  _rateLaw3 := 10^k3/(10^K4 + G);
  _rateLaw4 := 10^k5/(10^K6 + G);
  _rateLaw6 := 10^k8/(10^K9 + P);
  _rateLaw8 := 10^k11/(10^K12 + C);

  // Reactions:
  R1: Null => Null + Ga; _rateLaw1*Null;
  R2: Ga => Ga + Ga; _rateLaw2*Ga;
  R3: Ga + PLC => PLC; _rateLaw3*Ga*PLC;
  R4: Ga + Ca => Ca; _rateLaw4*Ga*Ca;
  R5: Ga => Ga + PLC; _rateLaw5*Ga;
  R6: Null + PLC => Null; _rateLaw6*Null*PLC;
  R7: Ga => Ga + Ca; _rateLaw7*Ga;
  R8: Null + Ca => Null; _rateLaw8*Null*Ca;

  // Unit definitions:
  unit substance = item;
end
