// SBML level 2 version 3

model mm()

  // Compartments:
  compartment cell = 1;

  // Species:
  species S1 in cell = 0.090337165/cell; S1 is "S()";
  species S2 in cell = 5.9915785/cell; S2 is "E()";
  species S3 in cell = 0.0084215191/cell; S3 is "ES()";
  species S4 in cell = 599.90124/cell; S4 is "P()";

  // Parameters:
  log_k1 = -2.77;
  log_k2 = -1;
  log_k3 = -2;

  // Assignment rules:
  S := 0 + S1;
  E := 0 + S2;
  ES := 0 + S3;
  P := 0 + S4;
  kf := 10^log_k1;
  kr := 10^log_k2;
  kcat := 10^log_k3;

  // Reactions:
  R1: S1 + S2 => S3; kf*S1*S2;
  R2: S3 => S1 + S2; kr*S3;
  R3: S3 => S2 + S4; kcat*S3;

  // Unit definitions:
  unit substance = item;
end
